# 2d SRD test: big + small particles

units		lj
atom_style	molecular

#atom_style	atomic
atom_modify	first cells	# treat big as first group atom list
dimension	3
boundary 	p f p		# x periodic y fix z periodic

# create big particles with sigma 1.0

lattice		sc 1 # reduced density: factor^2=1/0.4
bond_style      wlc/pow
angle_style     rbc
dihedral_style  bend
read_data       in.cells

pair_style lj/cut 2
pair_coeff 1 1 0 1 2
#set		type 1 mass 5000.0
#mass            1 20

#group big type 1
group           cells type 1

#velocity	cells create 1.8e-7 87287 loop geom # set/change group (big) velocity at temperature=1.44,
#velocity	cells zero linear # set/change group (big) velocity at temperature=1.44,


reset_timestep	0 # reset timestep to 0

neighbor	0.0 bin # set atom neighbor list for each atom
#neighbor	0.01 bin	    # create neighbor list: set skin=0.3, using bin style
neigh_modify	delay 0 every 1 check yes
neigh_modify exclude molecule/intra cells
# by (atom_modify first big)

# no pairwise interactions with small particles

# use fix SRD to push small particles out from inside big ones

timestep	1


#fix		1 all nve
#     nevery LBtype dynamic_vis rho
#fix 2 cells lb/fluid 1 1 0.1667 1 dx 1 dm 1 printfluid 100 zwall_velocity 0 1e-5
#fix 2 cells lbm 1 1 0.1667 1 dx 1 dm 1 printfluid 100 zwall_velocity 0 1e-5
#fix 2 cells lbm 1 1 0.1667 1 dx 1 dm 1 printfluid 100 zlo velocity 0 0 0 zhi velocity 0 1e-5 0
#fix 2 cells lbm 1 1 0.1667 1 dx 1 dm 1 printfluid 100 periodic 0 0 0 xlo wall xhi wall ylo wall yhi wall zlo velocity 0 0 0 zhi velocity 0 1e-5 0
#fix 3 cells lb/viscous
#fix             4 big move rotate 15 15 0 0 0 1 100
#fix             4 btm freeze
#fix             4 big setforce 0.0 0.0 0.0
fix 1 cells fcm 1
#fix 2 cells rigid single # not working , not sure the reason
fix 2 cells rigid/nve single # not working , not sure the reason
#fix 2 cells rigid single force * on on on torque * on on on # not working , not sure the reason
#thermo		100
#run             1000000

#compute		tbig cells temp # computing temperature (temp) for atoms (big), name it as (tbig)
#variable	pebig equal pe*atoms/count(cells) # varialbe (pebig)= pe*atoms/count(big)
#variable	ebig equal etotal*atoms/count(cells)

#thermo_modify	temp tbig
#thermo_modify   lost ignore
# reset (temp) defined in thermo_style as (tbig)
#thermo		100
#run             1000000
# output thermodynamic infor every 100 timesteps
dump            1 all xyz 225 dump.rbc.xyz
run	      1
